# 3d Lennard-Jones melt

units		lj
atom_style	atomic

lattice		fcc 0.8442
region		box block 0 4 0 4 0 4
create_box	1 box
create_atoms	1 box
mass		1 1.0

velocity	all create 10.0 87287

pair_style	lj/cut 2.5
pair_coeff	1 1 1.0 1.0 2.5

neighbor	0.3 bin
neigh_modify	every 20 delay 0 check no

python post_force_callback here """

from lammps import lammps
def post_force_callback(lammps_ptr, vflag):
	lmp = lammps(ptr=lammps_ptr)
	f = lmp.extract_atom("f",3)
	dx = 50
	natoms = lmp.get_natoms()
	for i in range(natoms):
			f[i][0] += dx
"""

fix		1 all nve
fix   2 all python/invoke 50 post_force post_force_callback

dump		id all atom 50 dumpT10.0.lammpstrj
#dump		id all xyz 10 dump.xyz

#dump		2 all image 25 image.*.jpg type type &
#		axes yes 0.8 0.02 view 60 -30
#dump_modify	2 pad 3

#dump		3 all movie 25 movie.mpg type type &
#		axes yes 0.8 0.02 view 60 -30
#dump_modify	3 pad 3

thermo		50
run		10000
